finish

/clear

/prep7

l=4

h=0.4

b=0.2

a0=b*h

i1=b*h*3/12

i2=b*h*3/12

et,1,beam4

mp,ex,1,2.1e11

mp,prxy,1,0.3

mp,alpx,1,1.0e-5

r,1,a0,i1,i2,b,h

k,1

k,2,,l

k,3,l,l

l,1,2

l,2,3

dk,1,all

dk,3,uy

lesize,all,,,10

lmesh,all
