/prep7
resume,test,db

/solu

tref,20

bfe,all,temp,1,0,,,-10

solve

/post1

*dim,BIAOGE,array,21,1,1
*do,i,1,21
*get,nodeuz,node,i,u,y
biaoge(i,1)=nodeuz
*enddo

*CFOPEN,JIEGUO,TXT


*DO,I,1,21,1
*VWRITE,BIAOGE(I,1)
(F10.6)
*ENDDO
*CFCLOS

FINISH
/EXIT,NOSAV
